variable nstruct equal 256
variable i loop ${nstruct}

label loop_struct
clear
log energies.log append
units metal
boundary p p p
atom_style atomic
read_data SiGe222_1000_${i}.in
mass 1 28.085
mass 2 72.63
pair_style sw
pair_coeff * * SiGe.sw Si Ge
run 0
next i
jump SELF loop_struct
